*Heading
** Job name: Job-1 Model name: Model-1
** Generated by: Abaqus/CAE 2021
*Preprint, echo=NO, model=NO, history=NO, contact=NO
**
** PARTS
**
*Part, name=Part-1
*End Part
**
**
** ASSEMBLY
**
*Assembly, name=Assembly
**
*Instance, name=Part-1-1, part=Part-1
*Node
      1,           0.,          99.
      2,  0.100000001,          99.
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*Element, type=CPS8
   1,    1,    2,  103,  102, 1112, 1113, 1114, 1115
   2,    2,    3,  104,  103, 1116, 1117, 1118, 1113
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*Nset, nset=_PickedSet2, internal, generate
    1,  3221,     1
*Elset, elset=_PickedSet2, internal, generate
    1,  1000,     1
** Section: Section-1
*Solid Section, elset=_PickedSet2, material=Material-1
,
*End Instance
**
*Node
      1,          10.,         99.5,           0.
*Nset, nset=_PickedSet9, internal, instance=Part-1-1
    1,  102,  203,  304,  405,  506
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*Elset, elset=_PickedSet9, internal, instance=Part-1-1, generate
   1,  901,  100
*Nset, nset=_PickedSet24, internal
 1,
*Nset, nset=_PickedSet31, internal
 1,
*Elset, elset=__PickedSurf23_S2, internal, instance=Part-1-1, generate
  100,  1000,   100
*Surface, type=ELEMENT, name=_PickedSurf23, internal
__PickedSurf23_S2, S2
** Constraint: Constraint-1
*Coupling, constraint name=Constraint-1, ref node=_PickedSet24, surface=_PickedSurf23
*Kinematic
*End Assembly
**
** MATERIALS
**
*Material, name=Material-1
*Depvar
     36,
*User Material, constants=300
-135.,  35.2641,    -135.,       1.,       2.,       1.,       2.,      12.
       6.,       0.,     0.25,  170000.,  124000.,   75000.,       0.,       0.
       0.,       0.,       0.,       0.,       1.,       0.,       0.,       0.
       3.,    0.001,      20.,       0.,       0.,       0.,       0.,       0.
       0.,       0.,       0.,       0.,       0.,       0.,       0.,       0.
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       0.,       0.,       0.,       0.
**
** BOUNDARY CONDITIONS
**
** Name: BC-1 Type: Symmetry/Antisymmetry/Encastre
*Boundary
_PickedSet9, ENCASTRE
** ----------------------------------------------------------------
**
** STEP: Step-1
**
*Step, name=Step-1, nlgeom=YES, inc=1000
*Static
0.1, 10., 0.0001, 10.
**
** LOADS
**
** Name: Load-1   Type: Moment
*Cload, follower
_PickedSet31, 6, 1000.
**
** OUTPUT REQUESTS
**
*Restart, write, frequency=0
**
** FIELD OUTPUT: F-Output-1
**
*Output, field
*Node Output
CF, RF, U
*Element Output, directions=YES
LE, PE, PEEQ, PEMAG, S, SDV
**
** HISTORY OUTPUT: H-Output-1
**
*Output, history, variable=PRESELECT
*End Step
