*Heading
** Job name: Job-1 Model name: Job-1
** Generated by: Abaqus/CAE 2021
*Preprint, echo=NO, model=NO, history=NO, contact=NO
**
** PARTS
**
*Part, name=PART-1
*Node
      1,           0.,    6.3499999,   12.6999998
      2,           0.,           0.,   12.6999998
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*Element, type=C3D6
 1,  15,   2,   1,  83,  84,  85
 2,  13,   2,  14,  86,  84,  88
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*Nset, nset=_PICKEDSET15, internal, generate
  1,  82,   1
*Elset, elset=_PICKEDSET15, internal, generate
  1,  80,   1
** Section: Section-1-_PICKEDSET15
*Solid Section, elset=_PICKEDSET15, material=MATERIAL-1
,
*End Part
**
**
** ASSEMBLY
**
*Assembly, name=Assembly
**
*Instance, name=PART-1-1, part=PART-1
*End Instance
**
*Nset, nset="center nodes", instance=PART-1-1
  2, 43
*Nset, nset=_PICKEDSET4, internal, instance=PART-1-1, generate
  1,  41,   1
*Elset, elset=_PICKEDSET4, internal, instance=PART-1-1, generate
  1,  40,   1
*Nset, nset=_PICKEDSET5, internal, instance=PART-1-1, generate
 42,  82,   1
*Elset, elset=_PICKEDSET5, internal, instance=PART-1-1, generate
  1,  40,   1
*End Assembly
**
** MATERIALS
**
*Material, name=MATERIAL-1
*Depvar
     12,
*User Material, constants=300
0.,      45.,       0.,       1.,       2.,       1.,       2.,      12.
       6.,       0.,     0.25,  170000.,  124000.,   75000.,       0.,       0.
       0.,       0.,       0.,       0.,       1.,       0.,       0.,       0.
       3.,    0.001,      20.,       0.,       0.,       0.,       0.,       0.
       0.,       0.,       0.,       0.,       0.,       0.,       0.,       0.
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       0.,       0.,       0.,       0.
** ----------------------------------------------------------------
**
** STEP: Step-1
**
*Step, name=Step-1, nlgeom=YES, inc=10000, solver=ITERATIVE
*Static
0.1, 500., 0.0001, 100.
**
** BOUNDARY CONDITIONS
**
** Name: Disp-BC-1 Type: Displacement/Rotation
*Boundary
_PICKEDSET4, 3, 3
** Name: Disp-BC-2 Type: Displacement/Rotation
*Boundary
_PICKEDSET4, 4, 4
** Name: Disp-BC-3 Type: Displacement/Rotation
*Boundary
_PICKEDSET4, 5, 5
** Name: Disp-BC-4 Type: Displacement/Rotation
*Boundary
_PICKEDSET4, 6, 6
** Name: Disp-BC-5 Type: Displacement/Rotation
*Boundary
_PICKEDSET5, 3, 3, 6.35
** Name: Disp-BC-6 Type: Displacement/Rotation
*Boundary
_PICKEDSET5, 4, 4
** Name: Disp-BC-7 Type: Displacement/Rotation
*Boundary
_PICKEDSET5, 5, 5
** Name: Disp-BC-8 Type: Displacement/Rotation
*Boundary
_PICKEDSET5, 6, 6
** Name: Disp-BC-9 Type: Displacement/Rotation
*Boundary
"center nodes", 1, 1
** Name: Disp-BC-10 Type: Displacement/Rotation
*Boundary
"center nodes", 2, 2
** Name: Disp-BC-11 Type: Displacement/Rotation
*Boundary
"center nodes", 4, 4
** Name: Disp-BC-12 Type: Displacement/Rotation
*Boundary
"center nodes", 5, 5
** Name: Disp-BC-13 Type: Displacement/Rotation
*Boundary
"center nodes", 6, 6
**
** OUTPUT REQUESTS
**
*Restart, write, frequency=0
**
** FIELD OUTPUT: F-Output-1
**
*Output, field
*Element Output, directions=YES
LE, S, SDV
**
** FIELD OUTPUT: F-Output-2
**
*Node Output
RF, U
**
** HISTORY OUTPUT: H-Output-1
**
*Output, history, variable=PRESELECT
*End Step
