*Heading
** Job name: Job-1 Model name: equiaxed_reso1
** Generated by: Abaqus/CAE 2021
*Preprint, echo=NO, model=NO, history=NO, contact=NO
**
** PARTS
**
*Part, name=DREAM3D
*Node
      1,           0.,           0.,           0.
      2,           2.,           0.,           0.
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*Element, type=C3D8
   1,  443,    2,    1,  442,  464,   23,   22,  463
   2,  444,    3,    2,  443,  465,   24,   23,  464
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*Elset, elset=GRAIN-1
  159,  160,  178,  179,  180,  197
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*Elset, elset=GRAIN-2
  291,  292,  293,  309,  310,  311
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*Elset, elset=GRAIN-3
  107,  126,  127,  128,  129,  145
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*Elset, elset=GRAIN-4
  210,  228,  229,  230,  231,  248
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*Elset, elset=GRAIN-5
 3206, 3604, 3605, 3606, 3607, 3625
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*Elset, elset=GRAIN-6
 1230, 1250, 1269, 1270, 1289, 1290
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*Elset, elset=GRAIN-7
 3845, 3865, 3866, 3886, 3887, 3906
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*Elset, elset=GRAIN-8
 6827, 7205, 7206, 7207, 7208, 7209
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*Elset, elset=GRAIN-9
 6657, 6658, 7036, 7037, 7038, 7056
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*Elset, elset=GRAIN-10
  121,  122,  141,  142,  143,  144
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*Elset, elset=GRAIN-11
 4292, 4310, 4311, 4312, 4313, 4331
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*Elset, elset=GRAIN-12
 6338, 6718, 6719, 6720, 6737, 6738
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*Elset, elset=GRAIN-13
 3964, 3965, 3966, 3982, 3983, 3984
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*Elset, elset=GRAIN-14
 6179, 6180, 6540, 6557, 6558, 6559
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*Elset, elset=GRAIN-15
 5262, 5281, 5282, 5283, 5301, 5302
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*Elset, elset=GRAIN-16
  800, 1180, 1199, 1200, 1520, 1539
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*Elset, elset=GRAIN-17
 7468, 7488, 7489, 7847, 7867, 7868, 7869, 7887, 7888
*Elset, elset=GRAIN-18
 2250, 2569, 2588, 2589, 2590, 2608
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*Elset, elset=GRAIN-19
 6368, 6387, 6388, 6748, 6766, 6767
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*Elset, elset=GRAIN-20
 2820, 3216, 3217, 3218, 3219, 3220
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*Elset, elset=GRAIN-21
 6676, 6677, 6678, 6696, 6697, 6698, 6699, 6717, 7096, 7097, 7098, 7496, 7497
*Elset, elset=GRAIN-22
  901,  922,  923, 1281, 1282, 1301
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*Elset, elset=GRAIN-23
 6021, 6041, 6042, 6401, 6402, 6421
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*Elset, elset=GRAIN-24
   11,   12,   13,   14,   15,   16
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*Elset, elset=GRAIN-25
 1428, 1448, 1807, 1808, 1809, 1827
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*Elset, elset=GRAIN-26
 4760, 4778, 4779, 4780, 4797, 4798
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*Elset, elset=GRAIN-27
 2198, 2218, 2238, 2239, 2560, 2577
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*Elset, elset=GRAIN-28
 6963, 6964, 6965, 6982, 6983, 6984
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*Elset, elset=GRAIN-29
  152,  153,  154,  155,  172,  173
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*Elset, elset=GRAIN-30
 1457, 1458, 1477, 1478, 1479, 1480
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*Elset, elset=GRAIN-31
 4548, 4550, 4551, 4552, 4553, 4571
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*Elset, elset=GRAIN-32
  256,  257,  258,  274,  275,  276
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*Elset, elset=GRAIN-33
  30,  31,  49,  50,  51,  68
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*Elset, elset=GRAIN-34
    1,    2,    3,    4,    5,    6
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*Elset, elset=PHASE-1, generate
    1,  8000,     1
** Section: Section-34-GRAIN-34
*Solid Section, elset=GRAIN-34, material=MATERIAL-GRAIN34
,
** Section: Section-24-GRAIN-24
*Solid Section, elset=GRAIN-24, material=MATERIAL-GRAIN24
,
** Section: Section-33-GRAIN-33
*Solid Section, elset=GRAIN-33, material=MATERIAL-GRAIN33
,
** Section: Section-3-GRAIN-3
*Solid Section, elset=GRAIN-3, material=MATERIAL-GRAIN3
,
** Section: Section-10-GRAIN-10
*Solid Section, elset=GRAIN-10, material=MATERIAL-GRAIN10
,
** Section: Section-29-GRAIN-29
*Solid Section, elset=GRAIN-29, material=MATERIAL-GRAIN29
,
** Section: Section-1-GRAIN-1
*Solid Section, elset=GRAIN-1, material=MATERIAL-GRAIN1
,
** Section: Section-4-GRAIN-4
*Solid Section, elset=GRAIN-4, material=MATERIAL-GRAIN4
,
** Section: Section-32-GRAIN-32
*Solid Section, elset=GRAIN-32, material=MATERIAL-GRAIN32
,
** Section: Section-2-GRAIN-2
*Solid Section, elset=GRAIN-2, material=MATERIAL-GRAIN2
,
** Section: Section-16-GRAIN-16
*Solid Section, elset=GRAIN-16, material=MATERIAL-GRAIN16
,
** Section: Section-22-GRAIN-22
*Solid Section, elset=GRAIN-22, material=MATERIAL-GRAIN22
,
** Section: Section-6-GRAIN-6
*Solid Section, elset=GRAIN-6, material=MATERIAL-GRAIN6
,
** Section: Section-25-GRAIN-25
*Solid Section, elset=GRAIN-25, material=MATERIAL-GRAIN25
,
** Section: Section-30-GRAIN-30
*Solid Section, elset=GRAIN-30, material=MATERIAL-GRAIN30
,
** Section: Section-27-GRAIN-27
*Solid Section, elset=GRAIN-27, material=MATERIAL-GRAIN27
,
** Section: Section-18-GRAIN-18
*Solid Section, elset=GRAIN-18, material=MATERIAL-GRAIN18
,
** Section: Section-20-GRAIN-20
*Solid Section, elset=GRAIN-20, material=MATERIAL-GRAIN20
,
** Section: Section-5-GRAIN-5
*Solid Section, elset=GRAIN-5, material=MATERIAL-GRAIN5
,
** Section: Section-7-GRAIN-7
*Solid Section, elset=GRAIN-7, material=MATERIAL-GRAIN7
,
** Section: Section-13-GRAIN-13
*Solid Section, elset=GRAIN-13, material=MATERIAL-GRAIN13
,
** Section: Section-11-GRAIN-11
*Solid Section, elset=GRAIN-11, material=MATERIAL-GRAIN11
,
** Section: Section-31-GRAIN-31
*Solid Section, elset=GRAIN-31, material=MATERIAL-GRAIN31
,
** Section: Section-26-GRAIN-26
*Solid Section, elset=GRAIN-26, material=MATERIAL-GRAIN26
,
** Section: Section-15-GRAIN-15
*Solid Section, elset=GRAIN-15, material=MATERIAL-GRAIN15
,
** Section: Section-23-GRAIN-23
*Solid Section, elset=GRAIN-23, material=MATERIAL-GRAIN23
,
** Section: Section-14-GRAIN-14
*Solid Section, elset=GRAIN-14, material=MATERIAL-GRAIN14
,
** Section: Section-12-GRAIN-12
*Solid Section, elset=GRAIN-12, material=MATERIAL-GRAIN12
,
** Section: Section-19-GRAIN-19
*Solid Section, elset=GRAIN-19, material=MATERIAL-GRAIN19
,
** Section: Section-9-GRAIN-9
*Solid Section, elset=GRAIN-9, material=MATERIAL-GRAIN9
,
** Section: Section-21-GRAIN-21
*Solid Section, elset=GRAIN-21, material=MATERIAL-GRAIN21
,
** Section: Section-8-GRAIN-8
*Solid Section, elset=GRAIN-8, material=MATERIAL-GRAIN8
,
** Section: Section-28-GRAIN-28
*Solid Section, elset=GRAIN-28, material=MATERIAL-GRAIN28
,
** Section: Section-17-GRAIN-17
*Solid Section, elset=GRAIN-17, material=MATERIAL-GRAIN17
,
*End Part
**
**
** ASSEMBLY
**
*Assembly, name=Assembly
**
*Instance, name=DREAM3D-1, part=DREAM3D
*End Instance
**
*Nset, nset=_PickedSet4, internal, instance=DREAM3D-1, generate
    1,  9241,    21
*Nset, nset=_PickedSet5, internal, instance=DREAM3D-1
    1,    2,    3,    4,    5,    6
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*Nset, nset=_PickedSet6, internal, instance=DREAM3D-1, generate
   1,  441,    1
*Nset, nset=_PickedSet7, internal, instance=DREAM3D-1, generate
   21,  9261,    21
*End Assembly
**
** MATERIALS
**
** MATERIALS
**
*Material, name=MATERIAL-GRAIN1
*Depvar
      1,
*User Material, constants=300
 226.338,   62.064,   57.659,       1.,       2.,       1.,       2.,      12.
       6.,       0.,     0.25,  170000.,  124000.,   75000.,       0.,       0.
       0.,       0.,       0.,       0.,       1.,       0.,       0.,       0.
       3.,    0.001,      20.,       0.,       0.,       0.,       0.,       0.
       0.,       0.,       0.,       0.,       0.,       0.,       0.,       0.
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       0.,       0.,       0.,       0.
*Material, name=MATERIAL-GRAIN2
*Depvar
      1,
*User Material, constants=300
 111.968,   39.887,  293.732,       2.,       2.,       1.,       2.,      12.
       6.,       0.,     0.25,  170000.,  124000.,   75000.,       0.,       0.
       0.,       0.,       0.,       0.,       1.,       0.,       0.,       0.
       3.,    0.001,      20.,       0.,       0.,       0.,       0.,       0.
       0.,       0.,       0.,       0.,       0.,       0.,       0.,       0.
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       0.,       0.,       0.,       0.
*Material, name=MATERIAL-GRAIN3
*Depvar
      1,
*User Material, constants=300
 101.225,  151.667,   61.616,       3.,       2.,       1.,       2.,      12.
       6.,       0.,     0.25,  170000.,  124000.,   75000.,       0.,       0.
       0.,       0.,       0.,       0.,       1.,       0.,       0.,       0.
       3.,    0.001,      20.,       0.,       0.,       0.,       0.,       0.
       0.,       0.,       0.,       0.,       0.,       0.,       0.,       0.
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       0.,       0.,       0.,       0.
*Material, name=MATERIAL-GRAIN4
*Depvar
      1,
*User Material, constants=300
 282.68,  143.239,   36.724,       4.,       2.,       1.,       2.,      12.
       6.,       0.,     0.25,  170000.,  124000.,   75000.,       0.,       0.
       0.,       0.,       0.,       0.,       1.,       0.,       0.,       0.
       3.,    0.001,      20.,       0.,       0.,       0.,       0.,       0.
       0.,       0.,       0.,       0.,       0.,       0.,       0.,       0.
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       0.,       0.,       0.,       0.
*Material, name=MATERIAL-GRAIN5
*Depvar
      1,
*User Material, constants=300
 12.173,  103.833,  191.914,       5.,       2.,       1.,       2.,      12.
       6.,       0.,     0.25,  170000.,  124000.,   75000.,       0.,       0.
       0.,       0.,       0.,       0.,       1.,       0.,       0.,       0.
       3.,    0.001,      20.,       0.,       0.,       0.,       0.,       0.
       0.,       0.,       0.,       0.,       0.,       0.,       0.,       0.
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       0.,       0.,       0.,       0.
*Material, name=MATERIAL-GRAIN6
*Depvar
      1,
*User Material, constants=300
 315.136,   74.239,   323.11,       6.,       2.,       1.,       2.,      12.
       6.,       0.,     0.25,  170000.,  124000.,   75000.,       0.,       0.
       0.,       0.,       0.,       0.,       1.,       0.,       0.,       0.
       3.,    0.001,      20.,       0.,       0.,       0.,       0.,       0.
       0.,       0.,       0.,       0.,       0.,       0.,       0.,       0.
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       0.,       0.,       0.,       0.
*Material, name=MATERIAL-GRAIN7
*Depvar
      1,
*User Material, constants=300
 324.239,   45.698,   271.31,       7.,       2.,       1.,       2.,      12.
       6.,       0.,     0.25,  170000.,  124000.,   75000.,       0.,       0.
       0.,       0.,       0.,       0.,       1.,       0.,       0.,       0.
       3.,    0.001,      20.,       0.,       0.,       0.,       0.,       0.
       0.,       0.,       0.,       0.,       0.,       0.,       0.,       0.
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       0.,       0.,       0.,       0.
*Material, name=MATERIAL-GRAIN8
*Depvar
      1,
*User Material, constants=300
 103.587,   55.884,  142.795,       8.,       2.,       1.,       2.,      12.
       6.,       0.,     0.25,  170000.,  124000.,   75000.,       0.,       0.
       0.,       0.,       0.,       0.,       1.,       0.,       0.,       0.
       3.,    0.001,      20.,       0.,       0.,       0.,       0.,       0.
       0.,       0.,       0.,       0.,       0.,       0.,       0.,       0.
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       0.,       0.,       0.,       0.
*Material, name=MATERIAL-GRAIN9
*Depvar
      1,
*User Material, constants=300
 2.111,   16.337,  179.909,       9.,       2.,       1.,       2.,      12.
       6.,       0.,     0.25,  170000.,  124000.,   75000.,       0.,       0.
       0.,       0.,       0.,       0.,       1.,       0.,       0.,       0.
       3.,    0.001,      20.,       0.,       0.,       0.,       0.,       0.
       0.,       0.,       0.,       0.,       0.,       0.,       0.,       0.
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       0.,       0.,       0.,       0.
*Material, name=MATERIAL-GRAIN10
*Depvar
      1,
*User Material, constants=300
 169.048,   37.976,   40.995,      10.,       2.,       1.,       2.,      12.
       6.,       0.,     0.25,  170000.,  124000.,   75000.,       0.,       0.
       0.,       0.,       0.,       0.,       1.,       0.,       0.,       0.
       3.,    0.001,      20.,       0.,       0.,       0.,       0.,       0.
       0.,       0.,       0.,       0.,       0.,       0.,       0.,       0.
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       0.,       0.,       0.,       0.
*Material, name=MATERIAL-GRAIN11
*Depvar
      1,
*User Material, constants=300
 305.847,  154.652,    1.608,      11.,       2.,       1.,       2.,      12.
       6.,       0.,     0.25,  170000.,  124000.,   75000.,       0.,       0.
       0.,       0.,       0.,       0.,       1.,       0.,       0.,       0.
       3.,    0.001,      20.,       0.,       0.,       0.,       0.,       0.
       0.,       0.,       0.,       0.,       0.,       0.,       0.,       0.
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       0.,       0.,       0.,       0.
*Material, name=MATERIAL-GRAIN12
*Depvar
      1,
*User Material, constants=300
 225.664,   55.852,   216.72,      12.,       2.,       1.,       2.,      12.
       6.,       0.,     0.25,  170000.,  124000.,   75000.,       0.,       0.
       0.,       0.,       0.,       0.,       1.,       0.,       0.,       0.
       3.,    0.001,      20.,       0.,       0.,       0.,       0.,       0.
       0.,       0.,       0.,       0.,       0.,       0.,       0.,       0.
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       0.,       0.,       0.,       0.
*Material, name=MATERIAL-GRAIN13
*Depvar
      1,
*User Material, constants=300
 237.901,  129.369,   147.05,      13.,       2.,       1.,       2.,      12.
       6.,       0.,     0.25,  170000.,  124000.,   75000.,       0.,       0.
       0.,       0.,       0.,       0.,       1.,       0.,       0.,       0.
       3.,    0.001,      20.,       0.,       0.,       0.,       0.,       0.
       0.,       0.,       0.,       0.,       0.,       0.,       0.,       0.
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       0.,       0.,       0.,       0.
*Material, name=MATERIAL-GRAIN14
*Depvar
      1,
*User Material, constants=300
 276.011,   64.034,  162.412,      14.,       2.,       1.,       2.,      12.
       6.,       0.,     0.25,  170000.,  124000.,   75000.,       0.,       0.
       0.,       0.,       0.,       0.,       1.,       0.,       0.,       0.
       3.,    0.001,      20.,       0.,       0.,       0.,       0.,       0.
       0.,       0.,       0.,       0.,       0.,       0.,       0.,       0.
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       0.,       0.,       0.,       0.
*Material, name=MATERIAL-GRAIN15
*Depvar
      1,
*User Material, constants=300
 97.674,   68.355,  316.488,      15.,       2.,       1.,       2.,      12.
       6.,       0.,     0.25,  170000.,  124000.,   75000.,       0.,       0.
       0.,       0.,       0.,       0.,       1.,       0.,       0.,       0.
       3.,    0.001,      20.,       0.,       0.,       0.,       0.,       0.
       0.,       0.,       0.,       0.,       0.,       0.,       0.,       0.
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       0.,       0.,       0.,       0.
*Material, name=MATERIAL-GRAIN16
*Depvar
      1,
*User Material, constants=300
 219.499,   81.184,   20.534,      16.,       2.,       1.,       2.,      12.
       6.,       0.,     0.25,  170000.,  124000.,   75000.,       0.,       0.
       0.,       0.,       0.,       0.,       1.,       0.,       0.,       0.
       3.,    0.001,      20.,       0.,       0.,       0.,       0.,       0.
       0.,       0.,       0.,       0.,       0.,       0.,       0.,       0.
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       0.,       0.,       0.,       0.
*Material, name=MATERIAL-GRAIN17
*Depvar
      1,
*User Material, constants=300
 218.905,   71.035,  281.634,      17.,       2.,       1.,       2.,      12.
       6.,       0.,     0.25,  170000.,  124000.,   75000.,       0.,       0.
       0.,       0.,       0.,       0.,       1.,       0.,       0.,       0.
       3.,    0.001,      20.,       0.,       0.,       0.,       0.,       0.
       0.,       0.,       0.,       0.,       0.,       0.,       0.,       0.
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       0.,       0.,       0.,       0.
*Material, name=MATERIAL-GRAIN18
*Depvar
      1,
*User Material, constants=300
 17.586,   49.586,  153.251,      18.,       2.,       1.,       2.,      12.
       6.,       0.,     0.25,  170000.,  124000.,   75000.,       0.,       0.
       0.,       0.,       0.,       0.,       1.,       0.,       0.,       0.
       3.,    0.001,      20.,       0.,       0.,       0.,       0.,       0.
       0.,       0.,       0.,       0.,       0.,       0.,       0.,       0.
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       0.,       0.,       0.,       0.
*Material, name=MATERIAL-GRAIN19
*Depvar
      1,
*User Material, constants=300
 50.061,   99.995,  307.428,      19.,       2.,       1.,       2.,      12.
       6.,       0.,     0.25,  170000.,  124000.,   75000.,       0.,       0.
       0.,       0.,       0.,       0.,       1.,       0.,       0.,       0.
       3.,    0.001,      20.,       0.,       0.,       0.,       0.,       0.
       0.,       0.,       0.,       0.,       0.,       0.,       0.,       0.
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       0.,       0.,       0.,       0.
*Material, name=MATERIAL-GRAIN20
*Depvar
      1,
*User Material, constants=300
 158.022,   47.465,    245.8,      20.,       2.,       1.,       2.,      12.
       6.,       0.,     0.25,  170000.,  124000.,   75000.,       0.,       0.
       0.,       0.,       0.,       0.,       1.,       0.,       0.,       0.
       3.,    0.001,      20.,       0.,       0.,       0.,       0.,       0.
       0.,       0.,       0.,       0.,       0.,       0.,       0.,       0.
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       0.,       0.,       0.,       0.
*Material, name=MATERIAL-GRAIN21
*Depvar
      1,
*User Material, constants=300
 329.105,  125.186,  202.439,      21.,       2.,       1.,       2.,      12.
       6.,       0.,     0.25,  170000.,  124000.,   75000.,       0.,       0.
       0.,       0.,       0.,       0.,       1.,       0.,       0.,       0.
       3.,    0.001,      20.,       0.,       0.,       0.,       0.,       0.
       0.,       0.,       0.,       0.,       0.,       0.,       0.,       0.
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       0.,       0.,       0.,       0.
*Material, name=MATERIAL-GRAIN22
*Depvar
      1,
*User Material, constants=300
 77.145,   59.432,  213.033,      22.,       2.,       1.,       2.,      12.
       6.,       0.,     0.25,  170000.,  124000.,   75000.,       0.,       0.
       0.,       0.,       0.,       0.,       1.,       0.,       0.,       0.
       3.,    0.001,      20.,       0.,       0.,       0.,       0.,       0.
       0.,       0.,       0.,       0.,       0.,       0.,       0.,       0.
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       0.,       0.,       0.,       0.
*Material, name=MATERIAL-GRAIN23
*Depvar
      1,
*User Material, constants=300
 116.489,   65.313,   75.784,      23.,       2.,       1.,       2.,      12.
       6.,       0.,     0.25,  170000.,  124000.,   75000.,       0.,       0.
       0.,       0.,       0.,       0.,       1.,       0.,       0.,       0.
       3.,    0.001,      20.,       0.,       0.,       0.,       0.,       0.
       0.,       0.,       0.,       0.,       0.,       0.,       0.,       0.
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       0.,       0.,       0.,       0.
*Material, name=MATERIAL-GRAIN24
*Depvar
      1,
*User Material, constants=300
 312.683,  121.825,  167.214,      24.,       2.,       1.,       2.,      12.
       6.,       0.,     0.25,  170000.,  124000.,   75000.,       0.,       0.
       0.,       0.,       0.,       0.,       1.,       0.,       0.,       0.
       3.,    0.001,      20.,       0.,       0.,       0.,       0.,       0.
       0.,       0.,       0.,       0.,       0.,       0.,       0.,       0.
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       0.,       0.,       0.,       0.
*Material, name=MATERIAL-GRAIN25
*Depvar
      1,
*User Material, constants=300
 218.821,   71.852,  303.397,      25.,       2.,       1.,       2.,      12.
       6.,       0.,     0.25,  170000.,  124000.,   75000.,       0.,       0.
       0.,       0.,       0.,       0.,       1.,       0.,       0.,       0.
       3.,    0.001,      20.,       0.,       0.,       0.,       0.,       0.
       0.,       0.,       0.,       0.,       0.,       0.,       0.,       0.
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       0.,       0.,       0.,       0.
*Material, name=MATERIAL-GRAIN26
*Depvar
      1,
*User Material, constants=300
 131.127,  159.288,   83.416,      26.,       2.,       1.,       2.,      12.
       6.,       0.,     0.25,  170000.,  124000.,   75000.,       0.,       0.
       0.,       0.,       0.,       0.,       1.,       0.,       0.,       0.
       3.,    0.001,      20.,       0.,       0.,       0.,       0.,       0.
       0.,       0.,       0.,       0.,       0.,       0.,       0.,       0.
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       0.,       0.,       0.,       0.
*Material, name=MATERIAL-GRAIN27
*Depvar
      1,
*User Material, constants=300
 331.145,   98.974,   27.263,      27.,       2.,       1.,       2.,      12.
       6.,       0.,     0.25,  170000.,  124000.,   75000.,       0.,       0.
       0.,       0.,       0.,       0.,       1.,       0.,       0.,       0.
       3.,    0.001,      20.,       0.,       0.,       0.,       0.,       0.
       0.,       0.,       0.,       0.,       0.,       0.,       0.,       0.
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       0.,       0.,       0.,       0.
*Material, name=MATERIAL-GRAIN28
*Depvar
      1,
*User Material, constants=300
 24.967,  140.048,  170.496,      28.,       2.,       1.,       2.,      12.
       6.,       0.,     0.25,  170000.,  124000.,   75000.,       0.,       0.
       0.,       0.,       0.,       0.,       1.,       0.,       0.,       0.
       3.,    0.001,      20.,       0.,       0.,       0.,       0.,       0.
       0.,       0.,       0.,       0.,       0.,       0.,       0.,       0.
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       0.,       0.,       0.,       0.
*Material, name=MATERIAL-GRAIN29
*Depvar
      1,
*User Material, constants=300
 174.842,   84.702,  278.453,      29.,       2.,       1.,       2.,      12.
       6.,       0.,     0.25,  170000.,  124000.,   75000.,       0.,       0.
       0.,       0.,       0.,       0.,       1.,       0.,       0.,       0.
       3.,    0.001,      20.,       0.,       0.,       0.,       0.,       0.
       0.,       0.,       0.,       0.,       0.,       0.,       0.,       0.
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       0.,       0.,       0.,       0.
*Material, name=MATERIAL-GRAIN30
*Depvar
      1,
*User Material, constants=300
 124.344,    27.79,   28.248,      30.,       2.,       1.,       2.,      12.
       6.,       0.,     0.25,  170000.,  124000.,   75000.,       0.,       0.
       0.,       0.,       0.,       0.,       1.,       0.,       0.,       0.
       3.,    0.001,      20.,       0.,       0.,       0.,       0.,       0.
       0.,       0.,       0.,       0.,       0.,       0.,       0.,       0.
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       0.,       0.,       0.,       0.
*Material, name=MATERIAL-GRAIN31
*Depvar
      1,
*User Material, constants=300
 52.229,  161.872,  121.082,      31.,       2.,       1.,       2.,      12.
       6.,       0.,     0.25,  170000.,  124000.,   75000.,       0.,       0.
       0.,       0.,       0.,       0.,       1.,       0.,       0.,       0.
       3.,    0.001,      20.,       0.,       0.,       0.,       0.,       0.
       0.,       0.,       0.,       0.,       0.,       0.,       0.,       0.
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       0.,       0.,       0.,       0.
*Material, name=MATERIAL-GRAIN32
*Depvar
      1,
*User Material, constants=300
 115.519,   43.012,  136.659,      32.,       2.,       1.,       2.,      12.
       6.,       0.,     0.25,  170000.,  124000.,   75000.,       0.,       0.
       0.,       0.,       0.,       0.,       1.,       0.,       0.,       0.
       3.,    0.001,      20.,       0.,       0.,       0.,       0.,       0.
       0.,       0.,       0.,       0.,       0.,       0.,       0.,       0.
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       0.,       0.,       0.,       0.
*Material, name=MATERIAL-GRAIN33
*Depvar
      1,
*User Material, constants=300
 208.028,   140.93,  201.896,      33.,       2.,       1.,       2.,      12.
       6.,       0.,     0.25,  170000.,  124000.,   75000.,       0.,       0.
       0.,       0.,       0.,       0.,       1.,       0.,       0.,       0.
       3.,    0.001,      20.,       0.,       0.,       0.,       0.,       0.
       0.,       0.,       0.,       0.,       0.,       0.,       0.,       0.
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       0.,       0.,       0.,       0.
*Material, name=MATERIAL-GRAIN34
*Depvar
      1,
*User Material, constants=300
 1.608,  132.559,  313.751,      34.,       2.,       1.,       2.,      12.
       6.,       0.,     0.25,  170000.,  124000.,   75000.,       0.,       0.
       0.,       0.,       0.,       0.,       1.,       0.,       0.,       0.
       3.,    0.001,      20.,       0.,       0.,       0.,       0.,       0.
       0.,       0.,       0.,       0.,       0.,       0.,       0.,       0.
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       0.,       0.,       0.,       0.
**
** BOUNDARY CONDITIONS
**
** Name: BC-1 Type: Symmetry/Antisymmetry/Encastre
*Boundary
_PickedSet4, XSYMM
** Name: BC-2 Type: Symmetry/Antisymmetry/Encastre
*Boundary
_PickedSet5, YSYMM
** Name: BC-3 Type: Symmetry/Antisymmetry/Encastre
*Boundary
_PickedSet6, ZSYMM
** ----------------------------------------------------------------
**
** STEP: Loading
**
*Step, name=Loading, nlgeom=YES, inc=10000
*Static
0.01, 10., 1e-05, 1.
**
** BOUNDARY CONDITIONS
**
** Name: BC-4 Type: Displacement/Rotation
*Boundary
_PickedSet7, 1, 1, 10.
**
** OUTPUT REQUESTS
**
*Restart, write, frequency=0
**
** FIELD OUTPUT: F-Output-2
**
*Output, field
*Element Output, directions=YES
SDV,
**
** FIELD OUTPUT: F-Output-1
**
*Output, field, variable=PRESELECT
**
** HISTORY OUTPUT: H-Output-1
**
*Output, history, variable=PRESELECT
*End Step
